W_0(s) := 5
W_1(s) := (s + 0.3)/(s^2 + 0.2*s + 0.04)
W_2(s) := 20
W_3(s) := 1/s
W_4(s) := 0.1/(s + 1)
W_5(s) := 1/s
W_6(s) := 0.25/(s + 0.001)
W'(s) := W_1(s)*1/(1 - W_4(s)/(W_1(s)*W_3(s)))
W''(s) := W_3(s) + W_6(s)
W'''(s) := W'(s)/(1 + W'(s))
W_yg(s) := W'''(s)*W''(s)*W_5(s)/(1 + W'''(s)*W''(s)*W_5(s))
W_yg(s) simplify → -(0*s^6 - 0*s^7 + 0*s^5 + 12.5*s^4 + 20.01*s^3 + 8.64*s^2 + 1.13*s + 0)/((s - 11.87)*(s + 0)*(s^2 + 0.6*s + 0.09)*(s^2 - 0.53*s + 0.84)*(s^2 + 2.19*s + 1.24))
W'(s) := W_1(s)/(1 + W_1(s)*W_2(s) - W_1(s)*W_3(s)*W_4(s))
W(s) := W'(s)*(W_3(s) + W_6(s))*W_5(s)/(1 + W'(s)*(W_3(s) + W_6(s))*W_5(s))
W(s) simplify → (0*s^5 + 0*s^4 + 1.25*s^3 + 1.626*s^2 + 0.376*s + 0)/((s + 0.302)*(s + 19.899)*(s + 0.001)*(s + 1.005)*(s^2 - 0.006*s + 0.062))
W(s) := (1.25*s^2 + 1.626*s + 0.376)/(s^5 + 21.2*s^4 + 26.247*s^3 + 7.217*s^2 + 1.601*s + 0.376)
Given
(48*x - 4*x^3)*(x^6 - 23*x^4 - 16*x^2 + 6400) + (x^6 + 12*x^4 + 48*x^2 + 64)*((80 - x^2)^2 + (12*x - x^3)^2) == 0
Find(x) → [-0.636125612193 - 3.09012961686i, -0.614895016538 + 0.878452982477i, -0.614895016538 - 0.878452982477i, -0.636125612193 + 3.09012961686i, 1.25102062873 - 2.00679435865i, 1.25102062873 + 2.00679435865i, sqrt(69*(72577/27 - 136*sqrt(30489)/9)^(1/3) - 9*(10342741825/729 - 19740944*sqrt(30489)/243)^(1/3) - 577)/(3*(72577/27 - 136*sqrt(30489)/9)^(1/6)), -sqrt(9*(10342741825/729 - 19740944*sqrt(30489)/243)^(1/3) - 69*(72577/27 - 136*sqrt(30489)/9)^(1/3) + 577)*1i/(3*(72577/27 - 136*sqrt(30489)/9)^(1/6)), sqrt(276*(72577/27 - 136*sqrt(30489)/9)^(1/3) + 18*(10342741825/729 - 19740944*sqrt(30489)/243)^(1/3) + 1154 - 1154i*sqrt(3) + 18i*sqrt(3)*(10342741825/729 - 19740944*sqrt(30489)/243)^(1/3))/(6*(72577/27 - 136*sqrt(30489)/9)^(1/6)), sqrt(276*(72577/27 - 136*sqrt(30489)/9)^(1/3) + 18*(10342741825/729 - 19740944*sqrt(30489)/243)^(1/3) + 1154 - 18i*sqrt(3)*(10342741825/729 - 19740944*sqrt(30489)/243)^(1/3) + 1154i*sqrt(3))/(6*(72577/27 - 136*sqrt(30489)/9)^(1/6)), -sqrt(276*(72577/27 - 136*sqrt(30489)/9)^(1/3) + 18*(10342741825/729 - 19740944*sqrt(30489)/243)^(1/3) + 1154 - 1154i*sqrt(3) + 18i*sqrt(3)*(10342741825/729 - 19740944*sqrt(30489)/243)^(1/3))/(6*(72577/27 - 136*sqrt(30489)/9)^(1/6)), -sqrt(276*(72577/27 - 136*sqrt(30489)/9)^(1/3) + 18*(10342741825/729 - 19740944*sqrt(30489)/243)^(1/3) + 1154 - 18i*sqrt(3)*(10342741825/729 - 19740944*sqrt(30489)/243)^(1/3) + 1154i*sqrt(3))/(6*(72577/27 - 136*sqrt(30489)/9)^(1/6))]
i := sqrt(-1)
Given
10/y^2*(4*sqrt(y^2 - 1) + 4*i/y^2) - i*x^3 - 4*x^2 + 4*i*x == 0
Find(x, y) → [-7.43760410929e-6 + 1.47503469478i; 98.3952473022 + 0.0023954890503i]
b := 1
c := π
A := 0, 0.01 .. 5
ω := 0, 0.01 .. π
Wn(A) := 4*c/(π*A)*sqrt(1 - b^2/A^2) + i*4*c*b/(π*A^2)
Wl(p) := 10/(p^3 + 6*p^2 + 12*p + 8)
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x := 0
Given
-x^6 - 12*x^4 - 40*x^3 - 48*x^2 + 480*x - 64 == 0
Find(x) → [2.14358104086, 0.135381328134, -2.56374481747 + 1.98027114929i, 1.42426363298 + 4.35734718057i, 1.42426363298 - 4.35734718057i, -2.56374481747 - 1.98027114929i]
T := sqrt(40/(12*2.14358104086 - 2.14358104086^3)) = 1.58743
T1 := sqrt(40/(12*0.135 - 0.135^3)) = 4.97282
dq(A) := -4/A^2*sqrt(1 - 1/A^2) + 4/(A^4*sqrt(1 - 1/A^2))
dq(1.587) = -0.421132
dq(4.973) = -0.151762
X(A, x) := 40/A*sqrt(1 - 1/A^2) - 6*x^2 + 8
Y(A, x) := -(40/A^2 + x^3 - 12*x)
dX := (d/dA(X(A, x)))  # error: This value must be a scalar.
dX(A) := -4/A^2*sqrt(1 - 1/A^2) + 4/(A^4*sqrt(1 - 1/A^2))
ddX(x) := -12*x
dY(A) := 80/A^3
ddY(x) := 3*x^2 - 12
f(A, x) := dX(A)*ddY(x) - ddX(x)*dY(A)
f(1.587, 2.15) = 515.605
f(4.973, 0.135) = 2.86662
q(A) := 4/A*sqrt(1 - 1/A^2)
dq(A) := d/dA(q(A))
dq(1.587) = -0.421132
dq(4.973) = -0.151762
F(A, x) := (4/A*sqrt(1 - 1/A^2) - 4*i/A^2)*10/(-i*x^3 - 6*x^2 + 12i*x + 8)
F(T1, 0.135381328134) = 0.917718 - 0.393682i
